*Heading
 Smoothed main surface
** Job name: CAE-SMOOTH Model name: Model-1
*Preprint, echo=NO, model=NO, history=NO, contact=NO
*RESTART,WRITE,FREQUENCY=50
** ----------------------------------------------------------------
**
** PART INSTANCE: DIE-1
**
*NODE, NSET=NREF
99999,  0.5 , 0.0
*Node,NSET=CONTACT
      1, 0.0999990031, -0.0214000009
      2,         0.25, -0.0214000009
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*Element, type=CAX4T,ELSET=CONTACT
 1,  79,  80,  84,  83
 2,  80,  28,  85,  84
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*Nset, nset=DIE-1__PickedSet2, generate
   1,  165,    1
*Elset, elset=DIE-1__PickedSet2, generate
   1,  128,    1
** Section: CONTACT
*Solid Section, elset=DIE-1__PickedSet2, material=RIGID
*RIGID BODY, ELSET=DIE-1__PickedSet2, ISOTHERMAL=YES,
REF NODE=99999
** ----------------------------------------------------------------
**
** PART INSTANCE: METALBAR-1
**
*Node,NSET=ALL
    166,           0.,           0.
    167, 0.00999999978,           0.
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*Element, type=CAX4T,ELSET=WORK
129, 166, 167, 178, 177
130, 167, 168, 179, 178
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*Nset, nset=METALBAR-1__PickedSet2, generate
 166,  506,    1
*Elset, elset=METALBAR-1__PickedSet2, generate
 129,  428,    1
** Section: WORK
*Solid Section, elset=METALBAR-1__PickedSet2, material=METAL
*System
*Nset, nset=TOP, generate
 496,  506,    1
*Elset, elset=TOP, generate
 419,  428,    1
*Nset, nset=AXIS, generate
 166,  496,   11
*Elset, elset=AXIS, generate
 129,  419,   10
*Nset, nset=ALL, generate
 166,  506,    1
*Elset, elset=ALL, generate
 129,  428,    1
*Nset, nset=CONTACT, generate
   1,  165,    1
*Elset, elset=CONTACT, generate
   1,  128,    1
*Nset, nset=BOT, generate
 166, 176,   1
*Elset, elset=BOT, generate
 129, 138,  1
*Nset, nset=SIDE, generate
 176,  506,   11
*Elset, elset=SIDE, generate
 138,  428,   10
*Elset, elset=_DIE-SURF_S4
  25,  41,  45,  49,  53,  57
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*Elset, elset=_DIE-SURF_S1, generate
 3,  6,  1
*Elset, elset=_DIE-SURF_S2
 40,
*Elset, elset=_DIE-SURF_S3, generate
 37,  40,   1
*Surface, type=ELEMENT, name=DIE-SURF
_DIE-SURF_S4, S4
_DIE-SURF_S1, S1
_DIE-SURF_S2, S2
_DIE-SURF_S3, S3
*Elset, elset=_METAL-SURF_S1, generate
129, 138,  1
*Elset, elset=_METAL-SURF_S2, generate
 138,  428,   10
*Surface, type=ELEMENT, name=METAL-SURF
_METAL-SURF_S1, S1
_METAL-SURF_S2, S2
**
** MATERIALS
**
*Material, name=METAL
*Elastic
 6.9e+10, 0.33
*PLASTIC
** STRAIN RATE APPX .1 **
60.E6,0.0   ,20.
90.E6,.125  ,20.
113.E6,.25  ,20.
124.E6,.375 ,20.
133.E6,0.5  ,20.
165.E6,1.0  ,20.
166.E6,2.0  ,20.
60.E6,0.    ,50.
80.E6,.125  ,50.
97.E6,.25   ,50.
110.E6,.375 ,50.
120.E6,0.5  ,50.
150.E6,1.0  ,50.
151.E6,2.0  ,50.
50.E6,0.0   ,100.
65.E6,.125  ,100,
81.5E6,.25  ,100.
91.E6,.375  ,100.
100.E6,0.5  ,100.
125.E6,1.0  ,100.
126.E6,2.0  ,100.
45.E6,0.0   ,150.
63.E6,.125  ,150.
75.E6,.25   ,150.
89.E6,.5    ,150.
110.E6,1.   ,150.
111.E6,2.   ,150.
*SPECIFIC HEAT
880.,
*DENSITY
2700.,
*CONDUCTIVITY
204.,0.
225.,300.
*EXPANSION,ZERO=20.0
8.42E-5,
*INELASTIC HEAT FRACTION
.9,
*Material, name=RIGID
*Elastic
 1e+10, 0.3
*PLASTIC
** STRAIN RATE APPX .1 **
60.E6,0.0   ,20.
90.E6,.125  ,20.
113.E6,.25  ,20.
124.E6,.375 ,20.
133.E6,0.5  ,20.
165.E6,1.0  ,20.
166.E6,2.0  ,20.
60.E6,0.    ,50.
80.E6,.125  ,50.
97.E6,.25   ,50.
110.E6,.375 ,50.
120.E6,0.5  ,50.
150.E6,1.0  ,50.
151.E6,2.0  ,50.
50.E6,0.0   ,100.
65.E6,.125  ,100,
81.5E6,.25  ,100.
91.E6,.375  ,100.
100.E6,0.5  ,100.
125.E6,1.0  ,100.
126.E6,2.0  ,100.
45.E6,0.0   ,150.
63.E6,.125  ,150.
75.E6,.25   ,150.
89.E6,.5    ,150.
110.E6,1.   ,150.
111.E6,2.   ,150.
*SPECIFIC HEAT
880.,
*DENSITY
2700.,
*CONDUCTIVITY
204.,0.
225.,300.
*EXPANSION,ZERO=20.0
8.42E-5,
**
** INTERACTION PROPERTIES
**
*Surface Interaction, name=FRIC-INTER
*Friction
0.1,
*Gap Heat Generation
1.
**
** INTERACTIONS
**
** Interaction: INTER
*Contact Pair, interaction=FRIC-INTER
METAL-SURF, DIE-SURF
**
** INITIAL CONDITIONS
*INITIAL CONDITIONS,TYPE=TEMPERATURE
 ALL,20.0
*STEP,AMPLITUDE=RAMP,NLGEOM, UNSYMM=YES
STABILIZE WORKPIECE INSIDE DIE
*COUPLED TEMPERATURE-DISPLACEMENT,DELTMX=100.
.1,1.
*BOUNDARY
NREF, 1, 2, 0.0
NREF, 6, 6, 0.0
NREF,11,11,20.0
AXIS,1,1,0.0
TOP,2,2,-.000125
ALL,11,11,20.0
*PRINT,CONTACT=YES
*OUTPUT,FIELD,VARIABLE=PRESELECT
*NODE OUTPUT,NSET=CONTACT
U
RF
NT
RFL
*ENERGY OUTPUT
*END STEP
**
*** step 2
**
*STEP,INC=800,AMPLITUDE=RAMP,NLGEOM, UNSYMM=YES
EXTRUSION
*COUPLED TEMPERATURE-DISPLACEMENT,DELTMX=100.
.1,10.
*BOUNDARY,OP=NEW
NREF, 1, 2, 0.0
NREF, 6, 6, 0.0
NREF, 11,11,20.0
AXIS,1,1,0.0
TOP,2,2,-.25
*PRINT,CONTACT=YES
*OUTPUT,FIELD,VARIABLE=PRESELECT
*NODE OUTPUT
 NT,
 U
RF
NT
RFL
*EL PRINT,ELSET=CONTACT,FREQUENCY=10
S
E
*ENERGY PRINT,FREQUENCY=1
*END STEP
**
*** step 3
**
*STEP,INC=200,AMPLITUDE=RAMP,NLGEOM, UNSYMM=YES
REMOVE CONTACT PAIRS
*COUPLED TEMPERATURE-DISPLACEMENT,DELTMX=100.
.1,.1,
*MODEL CHANGE,REMOVE, TYPE=CONTACT PAIR
 METAL-SURF,DIE-SURF
*PRINT,CONTACT=YES
*OUTPUT,FIELD,VARIABLE=PRESELECT
*NODE OUTPUT
U
RF
NT
RFL
*ENERGY PRINT,FREQUENCY=1
*END STEP
**
*** step 4
**
*STEP,INC=200,AMPLITUDE=RAMP,NLGEOM, UNSYMM=YES
LET WORKPIECE COOL DOWN
*COUPLED TEMPERATURE-DISPLACEMENT,DELTMX=100.
100.,10000.,
*FILM
BOT,F1,20.,10.
TOP,F3,20.,10.
SIDE,F2,20.,10.
*PRINT,CONTACT=YES
*OUTPUT,FIELD,VARIABLE=PRESELECT
*NODE OUTPUT
U
RF
NT
RFL
*ENERGY PRINT,FREQUENCY=1
*END STEP
