*Heading
** Job name: m_10 Model name: Model-1
** Generated by: Abaqus/CAE 2021
*Preprint, echo=NO, model=NO, history=NO, contact=NO
**
** PARTS
**
*Part, name=frame
*End Part
**
**
** ASSEMBLY
**
*Assembly, name=Assembly
**
*Instance, name=frame-1, part=frame
*Node
      1,         -20.,           0.
      2,         -10.,           0.
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*Element, type=CPS8R
1,   1,  27,  90,  32, 138, 139, 140, 141
2,  27,   2,  28,  90, 142, 143, 144, 139
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*Nset, nset=_PickedSet2, internal, generate
   1,  379,    1
*Elset, elset=_PickedSet2, internal, generate
   1,  104,    1
** Section: frame_section
*Solid Section, elset=_PickedSet2, material=steel
5.,
*End Instance
**
*Nset, nset=_PickedSet4, internal, instance=frame-1
   2,   3,   6,  13,  28,  29
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*Elset, elset=_PickedSet4, internal, instance=frame-1
  2,  4,  6,  7,  9, 21, 25, 28, 29
*Elset, elset=__PickedSurf7_S4, internal, instance=frame-1
 11, 13
*Elset, elset=__PickedSurf7_S2, internal, instance=frame-1, generate
 16,  20,   2
*Surface, type=ELEMENT, name=_PickedSurf7, internal
__PickedSurf7_S4, S4
__PickedSurf7_S2, S2
*End Assembly
**
** MATERIALS
**
*Material, name=steel
*Elastic
200000., 0.3
**
** BOUNDARY CONDITIONS
**
** Name: left_bc Type: Displacement/Rotation
*Boundary
_PickedSet4, 1, 1
_PickedSet4, 2, 2
** ----------------------------------------------------------------
**
** STEP: my_step
**
*Step, name=my_step, nlgeom=NO, inc=1000
*Static
0.01, 1., 1e-05, 1.
**
** LOADS
**
** Name: pressure   Type: Pressure
*Dsload
_PickedSurf7, P, 20.
**
** OUTPUT REQUESTS
**
*Restart, write, frequency=0
**
** FIELD OUTPUT: F-Output-1
**
*Output, field
*Node Output
CF, COORD, RF, U
*Element Output, directions=YES
LE, PE, S, PEEQ
**
** HISTORY OUTPUT: H-Output-1
**
*Output, history, variable=PRESELECT
*End Step
